F_OSC := 8000000
# Create white noise
[285, 22, 92; 3, 213, 64; 70, 41, 33]*(2.65*8) = [6042, 466.4, 1950.4; 63.6, 4515.6, 1356.8; 1484, 869.2, 699.6]
T_OSC := F_OSC/4 = 2000000
wn := whiten(777)
bin := 00001111b = 15
Time := 65535 - 63535 = 2000
n := 0 .. last(wn)
hex := 0xff = 255
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x := 5
Frequency := Time/T_OSC = 0.001
ceil(rnd(2*x)) = 4
str1 := "Fry"
((1/(T_OSC/2))*255)*1 = 0.000255
str2 := "seren..."
concat(str1, str2) = "Fryseren..."
usec_Result := 1*sec/T_OSC = 5e-7 s
strlen(str2) = 8
min(101, 122, 6, 133, -54, 44) = -54
sec_Result := usec_Result*1000000 = 0.5 s
r := 1 .. 8
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max(101, 122, 6, 133, -54, 44) = 133
hex := 0x3ff
counter := 75
π = 3.14159
first_num := floor(counter/10) = 7
MyArray := 1, 2, 3, ..10
3 hr + 4 min - 68 sec = 10972 s
second_num := mod(counter, 10) = 5
3 day + 3 day = 518400 s  # Bitshift - denne er lik: 1 << 3
1*2^3 = 8
200 ns = 2e-7 s
# Bitshift - denne er lik: 8 >> 2
200 ms = 0.2 s
8/2^2 = 2
a := 0, 0.05 .. 2*π
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exp(10) = 22026.5
log(10, 2) = 3.32193
77 and 15 = 1
# Formel for beregning av max_count
77 or 15 = 1
result := rnd(100)
not 0 = 1
f_result := (5*(result/0x3ff)) = 0.121517
INTERNAL_MIN_FREQUENCY := 2000
max_count := (INTERNAL_MIN_FREQUENCY*f_result)/5 = 48.607
