concat("asdas", "asdsad") = "asdasasdsad"
A := [2, 3, 4, 5; 7, 88, 90, 0; 0, 3, 4, -11]
svd(transpose(A)) = [
    [126.266; 12.1239; 1.68521];
    [
        0.0559848, 0.0804438, 0.855424;
        0.697727, 0.0167674, -0.400299;
        0.71417, -0.0201138, 0.32388;
        -0.00184459, 0.996415, -0.0557872
    ];
    [0.0400155, 0.998423, 0.0393625; 0.421713, 0.018838, -0.906533; 0.905846, -0.0528751, 0.420295]
]
transpose(A) = [2, 7, 0; 3, 88, 3; 4, 90, 4; 5, 0, -11]
A*transpose(A) = [54, 638, -30; 638, 15893, 624; -30, 624, 146]
