a := 13251
y := 2
b := a + 123 = 13374
# Formel for beregning av max_count
z := floor(y)
z = 2
result := rnd(100)
zz := -5 .. 5
f_result := (5*(result/0x3ff)) = 0.000619951
f(zz) := zz^2 + z
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MIN_FREQUENCY := 1000
maxcount := (MIN_FREQUENCY*f_result)/5 = 0.12399
finalmaxcount := floor(maxcount) = 0
x := 0 .. 50
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x2 := 0, 0.02 .. 8
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[1, 1, 1; 2, 2, 2*2; 3, 3, 3]*22 = [22, 22, 22; 44, 44, 88; 66, 66, 66]
# Use h,o and b for hex (note: prefix with 0 if first digit is A-F), oct and bin numbers:
sin(50) = -0.262375
sin(8) = 0.989358
sin(11) = -0.99999
123 = 123
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123h = 291
123o = 83
0Bh = 11
10001111b = 143
11b + 1111b = 18
# [component: outputs tabell]
# Absolutt verdi:
|-3.33| → 3.33
tabell[1, 1] = 12
tabell[2, 2] = 444
number := 0, 0.1 .. (4*π)
sin(number) = [
    0; 0.0998334; 0.198669; 0.29552; 0.389418; 0.479426; 0.564642; 0.644218; 0.717356; 0.783327
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]
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