T_OSC := 2000000
# Fibonnaci sequence:
# The golden ratio:
sqrt(5) = 2.23607
fib[0] := 0
(1 + sqrt(5))/2 = 1.61803
fib[1] := 1
theTime := 0.5, 1 .. 10
n := 2 .. 16
# In mathematics and the arts, two quantities are in the golden ratio
# if the ratio between the sum of those quantities and the larger one
# is the same as the ratio between the larger one and the smaller.
BPM(theTime) := (1/theTime)*60
fib[n] := fib[n - 1] + fib[n - 2]
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goldenRatio := (1 + sqrt(5))/2
f(n) := (goldenRatio^n - (1 - goldenRatio)^n)/sqrt(5)
f(x) := 3*x^2 + 1
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fib = [0; 1; 1; 2; 3; 5; 8; 13; 21; 34; 55; 89; 144; 233; 377; 610; 987]
# How many ways can you organize a set of elements? For example, 4 elements can be
# organized in 24 different ways:
1*2*3*4 = 24
theExpValue := 1, 1.0834 .. 8  # A Bitshift function
ShiftNumber := 256
theExpValue = [
    1; 1.0834; 1.1668; 1.2502; 1.3336; 1.417; 1.5004; 1.5838; 1.6672; 1.7506
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]
ShiftPlaces := -2
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ShiftResult := (ShiftNumber*(2^ShiftPlaces))
ShiftResult = 64
# Calculate note frequency from notenumber
concertPitch := 440
middle_a := 69
frequency(n) := (2^((n - middle_a)/12))*concertPitch
notes := 0 .. 127
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# A school has 135 girls and 115 boys. How many percent girls are there?
# Vector magnitude is the square root of the vector's dot product.
# (Dot product is multiplying with itself or another vector's same element)
PercentageOfGirls := (135/(135 + 115))*100 = 54
a := 0
b := 3
# A school has 120 girls and 100 boys. How many percent more girls are there?
z := 4
magnitude := sqrt((a^2) + (b^2) + (z^2))
PercentageMoreGirls := ((120 - 100)/100)*100 = 20
magnitude = 5
# Simple bitshift: | Vector sum:
v1 := [0, 3, 4]
(2^8) = 256
sum(v1) = 7
(2^2) = 4
v2 := [-2, 5, 8]
stuffer := [2, 3, 4; 5, 6, 7; 8, 9, 10]
# Type [ to create a subscript for accessing matrix elements:
morestuff := stuffer[(1, 2)]*100
morestuff = 700
