# Trying out an integral...
integral(x^2 + 3, x = 0 .. 2*π) = 101.533
x := -2 .. 2
f(x) := 2^x
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# Below is the range from 0 up to and including 10 (which is 11) multiplied with 3,
# which gives a sum of 33.
sum(3, m = 0 .. 10) = 33
